! ============================================================
! PARAMETRIC 3D TONOMETER SWEEP
! ARG1 = X offset in m
! ARG2 = nominal indentation after the initial gap in m
! ARG3 = solver retry mode (0=standard, 1=smaller initial steps)
! ARG4 = mesh size in m (default 0.3 mm)
! ARG5 = eyelid thickness in m (default 1.0 mm)
! ARG6 = IOP in Pa (default 2666.4 Pa = 20 mmHg)
! ARG7 = eyelid C10/C01 scale (default 1.0)
! ARG8 = cornea C10/C01 scale (default 1.0)
! ARG9 = unloaded probe-apex gap in m (default 0.30 mm)
! Known-working config: tet + flat probe + bonded eyelid-cornea
! + IOP preload, geometry-based probe approach, then indentation.
! ============================================================
finish
/clear
/prep7

Rc     = 7.8e-3
tc     = 0.6e-3
te     = ARG5
*if,te,le,0,then
te = 1.0e-3
*endif
*if,te,lt,0.8e-3,then
/com,ERROR: eyelid thickness is below the validated 0.8 mm limit
/exit,nosave
*endif
*if,te,gt,2.0e-3,then
/com,ERROR: eyelid thickness exceeds the validated 2.0 mm limit
/exit,nosave
*endif
Rprobe = 2.16e-3
gap0   = ARG9
*if,gap0,le,0,then
gap0 = 0.30e-3         ! keeps the probe clear during IOP preload
*endif
indent = ARG2
retry_mode = ARG3
mesh_size = ARG4
indent_limit = 0.8e-3
*if,indent,lt,0,then
/com,ERROR: indentation must be non-negative
/exit,nosave
*endif
*if,indent,gt,indent_limit,then
/com,ERROR: indentation exceeds the validated 0.8 mm limit
/exit,nosave
*endif
*if,mesh_size,le,0,then
mesh_size = 0.3e-3
*endif
iop    = ARG6
*if,iop,le,0,then
iop = 2666.4
*endif
eyelid_material_scale = ARG7
*if,eyelid_material_scale,le,0,then
eyelid_material_scale = 1.0
*endif
cornea_material_scale = ARG8
*if,cornea_material_scale,le,0,then
cornea_material_scale = 1.0
*endif
rmax   = 6.0e-3
xoff   = ARG1

et,1,187              ! SOLID187 tet
et,2,170
et,3,174

tb,hyper,1,,2,mooney
tbdata,1,0.11e6*cornea_material_scale,0.025e6*cornea_material_scale,0.1e-6
tb,hyper,2,,2,mooney
tbdata,1,0.076e6*eyelid_material_scale,0.01e6*eyelid_material_scale,0.1e-6
mp,ex,3,3500e6
mp,nuxy,3,0.33

csys,0
kcen = -Rc

! Cornea section
Rci = Rc - tc
k,1,0,0
k,2,rmax, kcen + sqrt(Rc*Rc-rmax*rmax)
k,3,0,-tc
k,4,rmax*Rci/Rc, kcen + sqrt(Rci*Rci-(rmax*Rci/Rc)**2)
k,100,0,kcen
larc,1,2,100,Rc
l,2,4
larc,3,4,100,Rci
l,1,3
al,1,2,3,4

! Eyelid section
Rce = Rc + te
k,5,0,te
k,6,rmax*Rce/Rc, kcen + sqrt(Rce*Rce-(rmax*Rce/Rc)**2)
larc,5,6,100,Rce
l,6,2
l,1,5
al,5,6,1,7

! Probe section (flat bottom rectangle)
py = te + gap0
k,10,0,py
k,11,Rprobe,py
k,12,Rprobe,py+4e-3
k,13,0,py+4e-3
l,10,11
l,11,12
l,12,13
l,13,10
al,8,9,10,11

! Revolve 360
k,200,0,-1
k,201,0,1
*get,vol_before,volu,0,num,maxd
asel,s,area,,1
vrotat,1,,,,,,200,201,360,4
*get,vol_after,volu,0,num,maxd
vsel,s,volu,,vol_before+1,vol_after
cm,vcornea,volu
allsel
*get,vol_before,volu,0,num,maxd
asel,s,area,,2
vrotat,2,,,,,,200,201,360,4
*get,vol_after,volu,0,num,maxd
vsel,s,volu,,vol_before+1,vol_after
cm,veyelid,volu
allsel
*get,vol_before,volu,0,num,maxd
asel,s,area,,3
vrotat,3,,,,,,200,201,360,4
*get,vol_after,volu,0,num,maxd
vsel,s,volu,,vol_before+1,vol_after
cm,vprobe,volu
allsel

! Offset probe in X
cmsel,s,vprobe
vgen,1,all,,,xoff,,,,,1
allsel

! Mesh and stable probe node components
esize,mesh_size
mshape,1,3d
cmsel,s,vcornea $ vatt,1,,1 $ vmesh,all $ allsel
cmsel,s,veyelid $ vatt,2,,1 $ vmesh,all $ allsel
cmsel,s,vprobe  $ vatt,3,,1 $ vmesh,all $ allsel
cmsel,s,vprobe
nslv,s,1
cm,probe_nodes,node
*get,pymax,node,0,mxloc,y
nsel,r,loc,y,pymax-0.6e-3,pymax+0.1e-3
cm,probe_top_nodes,node
allsel

! Stable apex node used to measure IOP-induced elevation before probe approach.
cmsel,s,veyelid
nslv,s,1
nsel,r,loc,x,-0.01e-3,0.01e-3
nsel,r,loc,z,-0.01e-3,0.01e-3
nsel,r,loc,y,te-0.01e-3,te+0.01e-3
*get,eyelid_apex_count,node,0,count
*if,eyelid_apex_count,lt,1,then
/com,ERROR: eyelid apex node was not found
/exit,nosave
*endif
*get,eyelid_apex_node_id,node,0,num,min
cm,eyelid_apex_node,node
allsel

! Contact 1: probe-eyelid standard
r,3
rmod,3,3,1.0
rmod,3,6,-0.5e-3
keyopt,3,12,0
keyopt,3,9,0
keyopt,3,2,1
local,13,2,0,kcen,0
csys,13
cmsel,s,veyelid $ nslv,s,1
nsel,r,loc,x,Rce-0.25e-3,Rce+0.3e-3
csys,0
type,3 $ real,3 $ mat,2 $ esurf
allsel
cmsel,s,probe_nodes
*get,pymin,node,0,mnloc,y
nsel,r,loc,y,pymin-0.01e-3,pymin+0.6e-3
type,2 $ real,3 $ mat,3 $ esurf
allsel

! Contact 2: eyelid-cornea bonded
et,4,170
et,5,174
r,4
keyopt,5,12,5
keyopt,5,2,1
csys,13
cmsel,s,vcornea $ nslv,s,1
nsel,r,loc,x,Rc-0.25e-3,Rc+0.25e-3
csys,0
type,5 $ real,4 $ mat,1 $ esurf
allsel
csys,13
cmsel,s,veyelid $ nslv,s,1
nsel,r,loc,x,Rc-0.25e-3,Rc+0.25e-3
csys,0
type,4 $ real,4 $ mat,2 $ esurf
allsel

! BCs
edge_y = kcen + sqrt(Rc*Rc - rmax*rmax)
cmsel,s,vcornea $ nslv,s,1
nsel,r,loc,y,edge_y-0.5e-3,edge_y+0.4e-3
d,all,all,0
allsel
csys,13
cmsel,s,vcornea $ nslv,s,1
nsel,r,loc,x,Rci-0.2e-3,Rci+0.2e-3
sf,all,pres,iop
csys,0
allsel

finish
/solu
antype,static
nlgeom,on
nropt,full
lnsrch,on
stabilize,constant,energy,1.0e-4
outres,all,all
cnvtol,f,,0.01
ncnv,1
autots,on
kbc,0

! Load step 1: establish IOP prestress with the probe physically separated.
cmsel,s,probe_top_nodes
d,all,ux,0
d,all,uy,0
d,all,uz,0
allsel
time,1
*if,retry_mode,eq,1,then
nsubst,40,400,10
*else
nsubst,20,200,5
*endif
solve
*get,preload_cnv,active,0,solu,cnvg

! Measure the preloaded apex and verify that the probe carried no preload.
finish
/post1
set,last
allsel
*get,preload_apex_uy,node,eyelid_apex_node_id,u,y
preload_probe_fy = 0
cmsel,s,probe_top_nodes
*get,preload_probe_node_count,node,0,count
*get,preload_probe_node,node,0,num,min
*do,preload_probe_index,1,preload_probe_node_count
*get,preload_node_fy,node,preload_probe_node,rf,fy
preload_probe_fy = preload_probe_fy + preload_node_fy
preload_probe_node = ndnext(preload_probe_node)
*enddo
allsel
etable,eras
esel,s,real,,3
esel,r,ename,,174
etable,plstat,cont,stat
etable,plarea,volu
esel,r,etab,plstat,2,3
*get,preload_contact_count,elem,0,count
preload_contact_area = 0
*if,preload_contact_count,gt,0,then
ssum
*get,preload_contact_area,ssum,0,item,plarea
*endif

preload_clearance = gap0 - preload_apex_uy
approach_push = preload_clearance
*if,approach_push,le,0,then
/com,ERROR: initial gap was consumed during IOP preload
/exit,nosave
*endif

! Load step 2: retain IOP and move to geometry-based first touch.
finish
/solu
cmsel,s,probe_top_nodes
d,all,uy,-approach_push
allsel
time,2
*if,retry_mode,eq,1,then
nsubst,40,400,10
*else
nsubst,20,200,5
*endif
solve
*get,approach_cnv,active,0,solu,cnvg

! Record the first-touch force without using it to redefine the zero point.
finish
/post1
set,last
approach_probe_fy = 0
allsel
cmsel,s,probe_top_nodes
*get,approach_probe_node_count,node,0,count
*get,approach_probe_node,node,0,num,min
*do,approach_probe_index,1,approach_probe_node_count
*get,approach_node_fy,node,approach_probe_node,rf,fy
approach_probe_fy = approach_probe_fy + approach_node_fy
approach_probe_node = ndnext(approach_probe_node)
*enddo
allsel
etable,eras
esel,s,real,,3
esel,r,ename,,174
etable,apstat,cont,stat
etable,aparea,volu
esel,r,etab,apstat,2,3
*get,approach_contact_count,elem,0,count
approach_contact_area = 0
*if,approach_contact_count,gt,0,then
ssum
*get,approach_contact_area,ssum,0,item,aparea
*endif

! Load step 3: apply the requested indentation from geometric first touch.
commanded_push = approach_push + indent
finish
/solu
cmsel,s,probe_top_nodes
d,all,uy,-commanded_push
allsel
time,3
*if,retry_mode,eq,1,then
nsubst,80,800,20
*else
nsubst,40,400,10
*endif
solve
*get,indent_cnv,active,0,solu,cnvg

*cfopen,solution_status,csv
*vwrite,preload_cnv,approach_cnv,indent_cnv
(3(E22.14,','))
*cfclos

*cfopen,load_path,csv
*vwrite,gap0,preload_apex_uy,preload_clearance,approach_push,commanded_push,indent,preload_probe_fy,preload_contact_area,preload_contact_count,approach_probe_fy,approach_contact_area,approach_contact_count
(12(E22.14,','))
*cfclos
save
finish
